*HEADING
cubit(sktop/Doktorat/trelis/Exports_coarse_mesh/whole_model.inp): 02/27/2020: 12
version: 16.5.4
**
********************************** P A R T S **********************************
*PART, NAME=Part-Default
**
********************************** N O D E S **********************************
*NODE, NSET=ALLNODES
 1377594,    3.705000e-01,    1.250000e-02,    1.250000e-02
 1377595,    3.702705e-01,    1.250000e-02,    1.468307e-02
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**
********************************** E L E M E N T S ****************************
*ELEMENT, TYPE=C3D8R, ELSET=BRB_1_block
  194874, 1402998, 1402967, 1402565, 1402564, 1382383, 1377662, 1377655, 1381923
  194875, 1402997, 1402998, 1402564, 1402563, 1382382, 1382383, 1381923, 1381922
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*ELEMENT, TYPE=C3D8R, ELSET=BRB_2_block
  196794, 1404448, 1404473, 1405213, 1404742, 1404471, 1404711, 1405375, 1404897
  196795, 1404473, 1404474, 1405206, 1405213, 1404711, 1404710, 1405376, 1405375
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**
********************************** S I D E S E T S **********************************
*ELSET, ELSET=fixed_bc_clamped_S1
  196714,  196715,  196716,  196717,  196718,  196719
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*SURFACE, NAME=fixed_bc_clamped
fixed_bc_clamped_S1, S1
*ELSET, ELSET=fixed_bc_clamped_2_S1
  196794,  196795,  196796,  196797,  196798,  196799
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*SURFACE, NAME=fixed_bc_clamped_2
fixed_bc_clamped_2_S1, S1
*ELSET, ELSET=contact_to_beam1_S2
  194874,  194875,  194876,  194877,  194878,  194879
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*SURFACE, NAME=contact_to_beam1
contact_to_beam1_S2, S2
*ELSET, ELSET=contact_to_beam_2_S2
  198639,  198640,  198641,  198642,  198643,  198649
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*SURFACE, NAME=contact_to_beam_2
contact_to_beam_2_S2, S2
*ELSET, ELSET=washer_area_top_S1
  179941,  179942,  179943,  179944,  179945,  179946
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*SURFACE, NAME=washer_area_top
washer_area_top_S1, S1
*ELSET, ELSET=washer_area_bottom_S2
  177508,  177509,  177510,  177511,  177512,  177513
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*SURFACE, NAME=washer_area_bottom
washer_area_bottom_S2, S2
*ELSET, ELSET=contact_area_S2
  178439,  178440,  178441,  178442,  178443,  178444
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*SURFACE, NAME=contact_area
contact_area_S2, S2
**
********************************** P R O P E R T I E S ************************
*SOLID SECTION, ELSET=BRB_1_block, MATERIAL=Default-Steel
*SOLID SECTION, ELSET=BRB_2_block, MATERIAL=Default-Steel
**
*END PART
**
**
**
********************************** E N D   P A R T S **********************************
**
**
********************************** A S S E M B L Y ************************************
**
*ASSEMBLY, NAME=ASSEMBLY1
**
*INSTANCE, NAME=Part-Default_1, PART=Part-Default
*END INSTANCE
**
*END ASSEMBLY
**
**
**
*MATERIAL, NAME = Default-Steel
*ELASTIC, TYPE=ISOTROPIC
2.068000e+05, 2.900000e-01
*DENSITY
7.000000e-06
*CONDUCTIVITY,TYPE=ISO
4.500000e-02
*SPECIFIC HEAT
5.000000e+02
**
**
************************************** H I S T O R Y *************************************
**
*PREPRINT
**
**************************************** S T E P 1 ***************************************
*STEP,INC=100,NAME=STEP1
**
*STATIC
1, 1, 1e-05, 1
**
**
**
**
*END STEP
**
**************************************** S T E P 2 ***************************************
*STEP,INC=100,NAME=STEP2
**
*STATIC
1, 1, 1e-05, 1
**
**
**
**
*END STEP
